#-------------------------
#
#This script is used to create different concentrations of vacancies in thorium dioxide
#By Ziqiang Wang on 07/03/2023
#
#-------------------------

clear
units                        metal
dimension                        3
boundary                     p p p
atom_style                   full
atom_modify                  map array

read_data                   perfect_relaxed.dat

set                         type    1      charge   -1.1104
set                         type    2      charge    2.2208

kspace_style                pppm     1.0e-05
pair_style                  hybrid/overlay    coul/long   11.0  eam/alloy
pair_coeff                  * * coul/long
pair_coeff                  * * eam/alloy CeThUNpPuAmCmO.eam.alloy O Th
neighbor                    2.0  bin
neigh_modify                every  1  delay  0  check  yes

# randomly create vacancies in the relaxed perfect crystal
variable         vac_ratio       equal    0.005
group Th_delete  id 4779  8377 17714 17704 10346 10395  7069  7060  9196  9193  1023  4564 &
                    5692  2091  6974  6975  1729  1660  7588  7647 17920 14319   409 14799 &
                    3205  3196  9889  6230  5896  5953
group O_delete   id 4723  4724  4716  4774 17709 17710 14106 14108 10341 10342 10339 10340  &
                    3408  3416  3462  3464  5598  5600  5532  5540   967   968   966   970  &
                    2094  2096  2035  2036  6969  6970  6919  6920 16068 16076 16062 16064  &
                    3990  3992  7591  7592 14322 14324 14263 14264 14748 14756 14743 14744  &
                    17544 17552 17598 17600  6228  6236  6225  6226  2298  2300  2292  2350
group              delete     union   Th_delete  O_delete
delete_atoms       group      delete

# fully relaxing the defect configuration at 0K
fix                box_relax  all  box/relax aniso 0.0 vmax 0.001
min_style          cg
minimize           1.0e-30 1.0e-30 10000 10000
unfix              box_relax

# apply the temperature into the system and relaxing at the temperature of interest
reset_atom_ids
variable                    temp      equal    600
velocity                    all  create   ${temp}  4542  dist  gaussian  rot  yes  mom  yes
fix                         npt  all  npt  temp  ${temp}  ${temp}  $(100*dt) aniso  0.0  0.0  $(1000*dt)

thermo                      10000
thermo_style                custom   step dt time atoms temp pe ke press vol

shell                       mkdir vac_${vac_ratio}_${temp}K
dump                        1  all  custom  10000  ./vac_${vac_ratio}_${temp}K/dump_relax.atom.* id type q x y z
dump_modify                 1  element  O  Th

run                         100000
shell                       mkdir thermal_condu
write_data                  thermal_condu/vac_${vac_ratio}_relaxed.dat
